<Node name="root" dt="0.01" gravity="0 -9.81 0">
    <DefaultAnimationLoop />
    <EulerImplicitSolver rayleighStiffness="0.01"/>
    <CGLinearSolver iterations="100" tolerance="1e-06" threshold="1e-06"/>
    <MeshGmshLoader name="meshLoader" filename="./Assets/SofaTestScenes/mesh/Gums.msh"/>

    <MechanicalObject name="myRigidDOF" template="Vec3d" src="@meshLoader" />
    <DiagonalMass densitymass="1.0"/>
    <TetrahedronFEMForceField name="FEM" youngModulus="5000" poissonRatio="0.45"/>
</Node>
